// SBML level 2 version 1
// Created with PySCeS (0.8.0) on Fri, 25 May 2012 10:55:10 by Haanstra

function vAK(substrate, product1, product2, k1, k2)
  k1*substrate^2 - k2*product1*product2;
end
vAK is "function_1";

function v1sub(V, substrate, Km)
  V*substrate/(Km + substrate);
end
v1sub is "Henri-Michaelis-Menten (irreversible)";

function v1sub1prod(Vf, rv, substrate, Kms, product, Kmp)
  (Vf*substrate/Kms - Vf*rv*product/Kmp)/(1 + substrate/Kms + product/Kmp);
end
v1sub1prod is "Reversible Michaelis-Menten";

function mass_action_rev(k1, substrate, k2, product)
  k1*substrate - k2*product;
end
mass_action_rev is "massactionrev";

function v2sub2prod(Vfmax, rv, S1, Ks1, S2, Ks2, P1, Kp1, P2, Kp2)
  Vfmax*(S1*S2/(Ks1*Ks2) - rv*P1*P2/(Kp1*Kp2))/((1 + S1/Ks1 + P1/Kp1)*(1 + S2/Ks2 + P2/Kp2));
end
v2sub2prod is "Rate Law bi bi";

model GlycoTryp_haanstra08()

  // Compartments:
  compartment Vc = 5.4549;
  compartment Vout = 1;
  compartment Vg = 0.2451;

  // Species:
  species _2PGA_c in Vc = 0;
  species ATP_g in Vg = 0.2405;
  species ATP_c in Vc = 0.3417;
  species $Glc_ext in Vout = 5;
  species DHAP_g in Vg = 8.483131;
  species ADP_g in Vg = 1.519;
  species Glc6P_g in Vg = 0.5;
  species Fru16BP_g in Vg = 10;
  species ADP_c in Vc = 1.3165;
  species _3PGA_c in Vc = 0;
  species Fru6P_g in Vg = 0.5;
  species $Pyruvate_ext in Vout = 0;
  species $O2 in Vout = 1;
  species $Pi_g in Vg = 0;
  species PEP_c in Vc = 1;
  species $CO2 in Vout = 0;
  species Gly3P_g in Vg = 10.51687;
  species NAD_g in Vg = 2;
  species Pyruvate_c in Vc = 10;
  species AMP_g in Vg = 4.2405;
  species _13BPGA_g in Vg = 0.5;
  species GAP_g in Vg = 2.5;
  species AMP_c in Vc = 2.2418;
  species Glc_g in Vg = 0;
  species NADH_g in Vg = 2;
  species $Glycerol_g in Vg = 0;

  // Parameters:
  Vfmax_tht = 108.9;
  KmGlc_tht = 1;
  alpha_tht = 0.75;
  Vfmax_hxk = 1929;
  KmGlc_hxk = 0.1;
  KmATP_hxk = 0.116;
  KmADP_hxk = 0.126;
  KmGlc6P_hxk = 12;
  Vfmax_pgi = 1305;
  KmGlc6P_pgi = 0.4;
  Keq_pgi = 0.3;
  KmFru6P_pgi = 0.12;
  Vfmax_pfk = 1708;
  Ki1_pfk = 15.8;
  KmFru6P_pfk = 0.82;
  KmATP_pfk = 0.026;
  Ki2_pfk = 10.7;
  Vfmax_ald = 560;
  Keq_ald = 0.069;
  KmFru16BP_ald = 0.009;
  KmATP_ald = 0.68;
  KmADP_ald = 1.51;
  KmAMP_ald = 3.65;
  KmDHAP_ald = 0.015;
  KmGAP_ald = 0.067;
  rv_ald = 1.19;
  KiGAP_ald = 0.098;
  Vfmax_tim = 999.3;
  rv_tim = 5.7;
  KmDHAP_tim = 1.2;
  KmGAP_tim = 0.25;
  Vfmax_gapdh = 720.9;
  rv_gapdh = 0.67;
  KmGAP_gapdh = 0.15;
  KmNAD_gapdh = 0.45;
  Km13BPGA_gapdh = 0.1;
  KmNADH_gapdh = 0.02;
  Vfmax_g3pdh = 465;
  rv_g3pdh = 0.28;
  KmDHAP_g3pdh = 0.1;
  KmNADH_g3pdh = 0.01;
  KmGly3P_g3pdh = 2;
  KmNAD_g3pdh = 0.4;
  Vfmax_gpo = 368;
  KmGly3P_gpo = 1.7;
  Vfmax_gk = 200;
  rv_gk = 60.86;
  KmGly3P_gk = 3.83;
  KmADP_gk = 0.56;
  KmGly_gk = 0.44;
  KmATP_gk = 0.24;
  Vfmax_pgk = 2862;
  rv_pgk = 0.47;
  Km13BPGA_pgk = 0.003;
  KmADP_pgk = 0.1;
  Km3PGA_pgk = 1.62;
  KmATP_pgk = 0.29;
  PGM_c_Vmax = 225;
  rv_pgam = 2.2;
  Km3PGA_pgam = 0.27;
  Km2PGA_pgam = 0.11;
  Vfmax_eno = 598;
  rv_eno = 0.66;
  Km2PGA_eno = 0.054;
  KmPEP_eno = 0.24;
  Vfmax_pyk = 1020;
  KmPEP_pyk = 0.34;
  KmPEP_ATP_pyk = 0.57;
  KmPEP_ADP_pyk = 0.64;
  n_pyk = 2.5;
  KmADP_pyk = 0.114;
  k_atput = 50;
  Vfmax_pyrtrans = 200;
  KmPyr_pyrtrans = 1.96;
  k1_ak_c = 442;
  k2_ak_c = 1000;
  k1_ak_g = 442;
  k2_ak_g = 1000;
  Glc_c = 0;

  // Reactions:
  THT: $Glc_ext -> Glc_g; Vfmax_tht*((Glc_ext - Glc_g)/(KmGlc_tht + Glc_ext + Glc_g + alpha_tht*Glc_ext*(Glc_g/KmGlc_tht)));
  HXK: ATP_g + Glc_g -> Glc6P_g + ADP_g; Vfmax_hxk*(Glc_g/KmGlc_hxk*ATP_g/KmATP_hxk)/((1 + ATP_g/KmATP_hxk + ADP_g/KmADP_hxk)*(1 + Glc_g/KmGlc_hxk + Glc6P_g/KmGlc6P_hxk));
  PGI: Glc6P_g -> Fru6P_g; Vfmax_pgi*Glc6P_g/KmGlc6P_pgi*(1 - Fru6P_g/(Glc6P_g*Keq_pgi))/(1 + Glc6P_g/KmGlc6P_pgi + Fru6P_g/KmFru6P_pgi);
  PFK: ATP_g + Fru6P_g => Fru16BP_g + ADP_g; Vfmax_pfk*(Ki1_pfk/(Fru16BP_g + Ki1_pfk)*(Fru6P_g/KmFru6P_pfk)*(ATP_g/KmATP_pfk)/((1 + Fru6P_g/KmFru6P_pfk + Fru16BP_g/Ki2_pfk)*(1 + ATP_g/KmATP_pfk)));
  ALD: Fru16BP_g -> GAP_g + DHAP_g; Vfmax_ald*((Fru16BP_g - GAP_g*DHAP_g/Keq_ald)/(KmFru16BP_ald*(1 + ATP_g/KmATP_ald + ADP_g/KmADP_ald + AMP_g/KmAMP_ald) + Fru16BP_g + (KmDHAP_ald*(1 + ATP_g/KmATP_ald + ADP_g/KmADP_ald + AMP_g/KmAMP_ald)*GAP_g + KmGAP_ald*DHAP_g + GAP_g*DHAP_g)/(rv_ald*Keq_ald) + Fru16BP_g*GAP_g/KiGAP_ald));  // modifiers: ATP_g, ADP_g, AMP_g
  TIM: DHAP_g -> GAP_g; v1sub1prod(Vfmax_tim, rv_tim, DHAP_g, KmDHAP_tim, GAP_g, KmGAP_tim);
  GAPDH: GAP_g + NAD_g + $Pi_g -> NADH_g + _13BPGA_g; v2sub2prod(Vfmax_gapdh, rv_gapdh, GAP_g, KmGAP_gapdh, NAD_g, KmNAD_gapdh, _13BPGA_g, Km13BPGA_gapdh, NADH_g, KmNADH_gapdh);
  G3PDH: NADH_g + DHAP_g -> Gly3P_g + NAD_g; v2sub2prod(Vfmax_g3pdh, rv_g3pdh, DHAP_g, KmDHAP_g3pdh, NADH_g, KmNADH_g3pdh, Gly3P_g, KmGly3P_g3pdh, NAD_g, KmNAD_g3pdh);
  GPO: Gly3P_g + 0.5 $O2 => DHAP_g; v1sub(Vfmax_gpo, Gly3P_g, KmGly3P_gpo);
  GK: Gly3P_g + ADP_g -> $Glycerol_g + ATP_g; v2sub2prod(Vfmax_gk, rv_gk, Gly3P_g, KmGly3P_gk, ADP_g, KmADP_gk, Glycerol_g, KmGly_gk, ATP_g, KmATP_gk);
  PGK: _13BPGA_g + ADP_g -> _3PGA_c + ATP_g; v2sub2prod(Vfmax_pgk, rv_pgk, _13BPGA_g, Km13BPGA_pgk, ADP_g, KmADP_pgk, _3PGA_c, Km3PGA_pgk, ATP_g, KmATP_pgk);
  PGAM: _3PGA_c -> _2PGA_c; v1sub1prod(PGM_c_Vmax, rv_pgam, _3PGA_c, Km3PGA_pgam, _2PGA_c, Km2PGA_pgam);
  ENO: _2PGA_c -> PEP_c; v1sub1prod(Vfmax_eno, rv_eno, _2PGA_c, Km2PGA_eno, PEP_c, KmPEP_eno);
  PYK: PEP_c + ADP_c => Pyruvate_c + ATP_c; Vfmax_pyk*((PEP_c/(KmPEP_pyk*(1 + ATP_c/KmPEP_ATP_pyk + ADP_c/KmPEP_ADP_pyk)))^n_pyk*(ADP_c/KmADP_pyk)/((1 + (PEP_c/(KmPEP_pyk*(1 + ATP_c/KmPEP_ATP_pyk + ADP_c/KmPEP_ADP_pyk)))^n_pyk)*(1 + ADP_c/KmADP_pyk)));
  ATPU: ATP_c => ADP_c; k_atput*ATP_c/ADP_c;
  PYTRAN: Pyruvate_c => $Pyruvate_ext; v1sub(Vfmax_pyrtrans, Pyruvate_c, KmPyr_pyrtrans);
  AKC: 2 ADP_c -> AMP_c + ATP_c; vAK(ADP_c, AMP_c, ATP_c, k1_ak_c, k2_ak_c);
  AKG: 2 ADP_g -> AMP_g + ATP_g; vAK(ADP_g, AMP_g, ATP_g, k1_ak_g, k2_ak_g);

  // Unit definitions:
  unit volume = 1e-6 litre;
  unit length = metre;
  unit substance = 1e-9 mole;
  unit time = 60 second;
  unit area = metre^2;
end
