// SBML level 2 version 4

function Constant_flux_irreversible(v)
  v;
end
Constant_flux_irreversible is "Constant flux (irreversible)";

function Rate_Law_for_reaction_2(comp, parameter, X, Y)
  comp*parameter^2*X*Y*(Y - 1/comp);
end

model Model_1()
  // Brusselator

  // Compartments:
  compartment compartment_1 = 100;

  // Species:
  species X in compartment_1 = 0;
  species Y in compartment_1 = 0;

  // Parameters:
  a = 3;
  b = 1.95;

  // Reactions:
  reaction_1: => X; compartment_1*Constant_flux_irreversible(v);
    v = 1;
  reaction_2: 2 X + Y => 3 X; compartment_1*Rate_Law_for_reaction_2(compartment_1, parameter, Y, X);
    parameter = 0.1;
  reaction_3: X => Y; compartment_1*b*X;
  reaction_4: X => ; compartment_1*k1*X;
    k1 = 1;

  // Unit definitions:
  unit volume = litre;
  unit substance = item;
end
