// SBML level 2 version 4

model dimer()
  // Dimerization

  // Compartments:
  compartment cell = Omega;

  // Species:
  species D in cell = Omega^(-1);
  species mRNA in cell = 0;
  species Protein in cell = 0;
  species Q in cell = 0;
  species Dimer in cell = 0;
  species Don in cell = 0;
  species R in cell = Omega^(-1)*30;
  species T in cell = 0;

  // Parameters:
  k1 = 0.0078;
  k2 = k3*11;
  k3 = 0.0039;
  km7 = 0.9;
  k7 = 0.012;
  k4 = 0.0007;
  Omega = 1;
  k6 = 0;
  km6 = 0.5;
  km5 = 0.3;
  k5 = 0.038;
  km8 = K9^(-1)*7.75;
  k8 = K9*0.00526;
  km9 = K9*0.2;
  k9 = K9^(-1)*0.2;
  K9 = 200^0.5;

  // Reactions:
  translation: mRNA => mRNA + Protein; mRNA*cell*k2; translation is "Translation";
  degrade_mRNA: mRNA => ; k3*mRNA*cell; degrade_mRNA is "mRNA degradation";
  protein_degradation: Protein => ; cell*Protein*k4; protein_degradation is "Protein degradation";
  NFReverse: Q => D + Dimer; km7*cell*Q; NFReverse is "NF (Reverse)";
  NF: D + Dimer => Q; Dimer*cell*k7*D;
  Polymerase: D + R => Don; cell*k5*R*D;
  PolymeraseReverse: Don => D + R; km5*Don*cell; PolymeraseReverse is "Polymerase (Reverse)";
  transcription: Don => mRNA + D + R; Don*cell*k1; transcription is "Transcription";
  reaction_1: D + Protein => T; k8*cell*Protein*D;
  reaction_1Reverse: T => D + Protein; cell*km8*T; reaction_1Reverse is "reaction (Reverse)";
  reaction_2: Protein + T => Q; cell*Protein*k9*T;
  reaction_2Reverse: Q => Protein + T; cell*km9*Q; reaction_2Reverse is "reaction (Reverse)";

  // Unit definitions:
  unit substance = item;
  unit volume = litre;
  unit area = metre^2;
  unit length = metre;
  unit time = 60 second;
end
