// SBML level 2 version 4

model FourSubunitEnzyme()
  // 4-Subunit enzyme with cooperative kinetics

  // Compartments:
  compartment compartment = 1e-15;

  // Species:
  species species_S in compartment = 0;
  species species_P in compartment = 0;
  species species_E in compartment = 1;
  species species_ES in compartment = 0;
  species species_ES2 in compartment = 0;
  species species_ES3 in compartment = 0;
  species species_ES4 in compartment = 0;

  // Reactions:
  input: => species_S; compartment*kin;
    kin = 9;
  output: species_P => ; compartment*kout*species_P; output is "consumption";
    kout = 10;
  bind1: species_E + species_S => species_ES; compartment*k1*species_E*species_S;
    k1 = 1;
  bind2: species_ES + species_S => species_ES2; compartment*k2*species_ES*species_S;
    k2 = 10;
  bind3: species_ES2 + species_S => species_ES3; compartment*k3*species_ES2*species_S;
    k3 = 100;
  bind4: species_ES3 + species_S => species_ES4; compartment*k4*species_ES3*species_S;
    k4 = 1000;
  unbind1: species_ES => species_S + species_E; compartment*km1*species_ES;
    km1 = 10;
  unbind2: species_ES2 => species_ES + species_S; compartment*km2*species_ES2;
    km2 = 10;
  unbind3: species_ES3 => species_ES2 + species_S; compartment*km3*species_ES3;
    km3 = 10;
  unbind4: species_ES4 => species_ES3 + species_S; compartment*km4*species_ES4;
    km4 = 10;
  vcat1: species_ES => species_E + species_P; compartment*vcat1_kcat*species_ES;
    vcat1_kcat = 10;
  vcat2: species_ES2 => species_ES + species_P; compartment*vcat2_kcat*species_ES2;
    vcat2_kcat = 10;
  vcat3: species_ES3 => species_ES2 + species_P; compartment*vcat3_kcat*species_ES3;
    vcat3_kcat = 10;
  vcat4: species_ES4 => species_ES3 + species_P; compartment*vcat4_kcat*species_ES4;
    vcat4_kcat = 10;

  // Unit definitions:
  unit per_second = 1 / second;
  unit litre_per_mole_per_second = litre / (mole * second);
  unit substance = 1e-6 mole;
  unit volume = litre;
end
