// SBML level 2 version 4

function Constant_flux_irreversible(v)
  v;
end
Constant_flux_irreversible is "Constant flux (irreversible)";

model EnzymaticReaction()
  // 4-Subunit enzyme with cooperative kinetics

  // Compartments:
  compartment cytosol = 1e-16;

  // Species:
  species ES in cytosol = 0;
  species S in cytosol = 0;
  species E in cytosol = 1e-16/cytosol;
  species ESS in cytosol = 0;
  species ESSS in cytosol = 0;
  species ESSSS in cytosol = 0;
  species P in cytosol = 0;

  // Reactions:
  veq: E + S => ES; cytosol*veq_k1*E*S; veq is "bind1";
    veq_k1 = 1;
  vcat: ES => E + P; cytosol*vcat_k1*ES; vcat is "vcat1";
    vcat_k1 = 10;
  input: => S; cytosol*Constant_flux_irreversible(v);
    v = 9;
  unbind1: ES => S + E; cytosol*unbind1_k1*ES;
    unbind1_k1 = 10;
  bind2: ES + S => ESS; cytosol*bind2_k1*ES*S;
    bind2_k1 = 10;
  unbind2: ESS => ES + S; cytosol*unbind2_k1*ESS;
    unbind2_k1 = 10;
  vcat2: ESS => ES + P; cytosol*vcat2_k1*ESS;
    vcat2_k1 = 10;
  bind3: ESS + S => ESSS; cytosol*bind3_k1*ESS*S;
    bind3_k1 = 100;
  bind4: ESSS + S => ESSSS; cytosol*bind4_k1*ESSS*S;
    bind4_k1 = 1000;
  unbind4: ESSSS => ESSS + S; cytosol*unbind4_k1*ESSSS;
    unbind4_k1 = 10;
  unbind3: ESSS => ESS + S; cytosol*unbind3_k1*ESSS;
    unbind3_k1 = 10;
  vcat3: ESSS => ESS + P; cytosol*vcat3_k1*ESSS;
    vcat3_k1 = 10;
  vcat4: ESSSS => ESSS + P; cytosol*vcat4_k1*ESSSS;
    vcat4_k1 = 10;
  out: P => ; cytosol*out_k1*P;
    out_k1 = 10;

  // Unit definitions:
  unit per_second = 1 / second;
  unit litre_per_mole_per_second = litre / (mole * second);
  unit substance = 1e-6 mole;
  unit volume = litre;
end
