// SBML level 2 version 4

function Constant_flux_irreversible(v)
  v;
end
Constant_flux_irreversible is "Constant flux (irreversible)";

model EnzymeReaction()
  // Michaelis-Menten (open reaction)

  // Compartments:
  compartment compartment = 5e-16;

  // Species:
  species species_S in compartment = 0;
  species species_P in compartment = 0;
  species species_E in compartment = 4e-6;
  species species_ES in compartment = 0;

  // Parameters:
  quantity_1 = 1e-5;

  // Reactions:
  input: => species_S; compartment*Constant_flux_irreversible(quantity_1);
  bind: species_E + species_S => species_ES; compartment*bind_k1*species_E*species_S;
    bind_k1 = 50000000;
  unbind: species_ES => species_S + species_E; compartment*unbind_k1*species_ES;
    unbind_k1 = 5;
  vcat: species_ES => species_E + species_P; compartment*vcat_k1*species_ES;
    vcat_k1 = 5;
  out: species_P => ; compartment*out_k1*species_P;
    out_k1 = 7;

  // Unit definitions:
  unit per_second = 1 / second;
  unit litre_per_mole_per_second = litre / (mole * second);
end
