// SBML level 2 version 4

model EnzymeReaction()
  // Michaelis-Menten (open reaction)

  // Compartments:
  compartment compartment = 1e-17;

  // Species:
  species species_S in compartment = 0;
  species species_P in compartment = 0;
  species species_E in compartment = 4e-6;
  species species_ES in compartment = 0;

  // Reactions:
  input: => species_S; compartment*kin;
    kin = 1.8e-5;
  bind: species_E + species_S => species_ES; compartment*k1*species_E*species_S;
    k1 = 50000000;
  unbind: species_ES => species_S + species_E; compartment*km1*species_ES;
    km1 = 5;
  vcat: species_ES => species_E + species_P; compartment*k2*species_ES;
    k2 = 5;
  out: species_P => ; compartment*kout*species_P;
    kout = 7;

  // Unit definitions:
  unit per_second = 1 / second;
  unit litre_per_mole_per_second = litre / (mole * second);
end
