// SBML level 2 version 4

function function_1(substrate, Km, V)
  V*substrate/(Km + substrate);
end
function_1 is "Henri-Michaelis-Menten (irreversible)";

function function_4_transscription_1(K, a, P2)
  a*K/(P2 + K);
end

model Model_1()
  // Goodwin Hopf Bifurcation

  // Compartments:
  compartment cytosol = 1000;

  // Species:
  species M in cytosol = 0;
  species P in cytosol = 0;
  species P2 in cytosol = 0;

  // Parameters:
  b = 0.2;
  a = 170;
  c = 10;

  // Reactions:
  transscription: => M; cytosol*function_4_transscription_1(K, a, P2);  // modifiers: P2
    K = 1;
  translate: M => M + P; cytosol*b*M;
  enzyme_degradation: P2 => ; cytosol*function_1(P2, Km, c);
    Km = 1;
  m_degrad: M => ; cytosol*b*M;
  transport_out: P => P2; cytosol*b*P;

  // Unit definitions:
  unit volume = litre;
  unit substance = item;
end
