// SBML level 2 version 4

model Core_Model()
  // Core model for circadian rhythms

  // Compartments:
  compartment compartment = 1.5e-15; compartment is "cytosol";

  // Species:
  species species_M in compartment = 0;
  species species_P in compartment = 0; species_P is "PC";
  species species_PN in compartment = 0;
  species species_G in compartment = Omega^(-1);
  species species_GP in compartment = 0; species_GP is "GPN";
  species species_GPN2 in compartment = 0;
  species species_E in compartment = 10;
  species species_EP in compartment = 0;
  species species_D in compartment = 1;
  species species_DP in compartment = 0;

  // Parameters:
  k2 = feedback*Omega*0.5;
  km2 = Omega*0.5;
  transcription = Omega*500; transcription is "k0";
  parameter_4 = k2*50; parameter_4 is "k3";
  Omega = compartment*6e17;
  feedback = 10;

  // Reactions:
  transscription: species_G => species_M + species_G; transcription*compartment*species_G;
  translate: species_M => species_M + species_P; compartment*species_M*ks;
    ks = 5;
  pg_unbind: species_GP => species_PN + species_G; species_GP*compartment*km2;
  enzyme2bindP: species_E + species_PN => species_EP; k4*species_PN*compartment*species_E;
    k4 = 10;
  enzyme2unbindP: species_EP => species_E + species_PN; compartment*km4*species_EP;
    km4 = 5;
  enzyme2cat: species_EP => species_E; compartment*kcat4*species_EP;
    kcat4 = 10;
  p_degrad: species_P => ; species_P*kdp*compartment;
    kdp = 0.5;
  m_degrad: species_M => ; kdm*compartment*species_M;
    kdm = 5;
  pg_bind: species_PN + species_G => species_GP; species_PN*compartment*k2*species_G;
  transport_in: species_P => species_PN; species_P*compartment*kin;
    kin = 5;
  transport_out: species_PN => species_P; kout*species_PN*compartment;
    kout = 5;
  pg_bind2: species_PN + species_GP => species_GPN2; species_GP*species_PN*compartment*parameter_4;
  pg_unbind2: species_GPN2 => species_PN + species_GP; species_GPN2*compartment*km2;
  enzyme1bind: species_P + species_D => species_DP; species_P*species_D*k3*compartment;
    k3 = 0.5;
  enzyme1unbind: species_DP => species_P + species_D; compartment*species_DP*km3;
    km3 = 0.5;
  enzyme1cat: species_DP => species_D; compartment*species_DP*kcat3;
    kcat3 = 0.5;

  // Unit definitions:
  unit substance = 1e-6 mole;
  unit volume = litre;
  unit area = metre^2;
  unit length = metre;
  unit time = 86400 second;
end
