// SBML level 2 version 4

model Core_Model()
  // Core model for circadian rhythms

  // Compartments:
  compartment compartment = 1e-13; compartment is "cytosol";

  // Species:
  species M in compartment = 0;
  species P in compartment = 0;
  species Pstar in compartment = 0; Pstar is "$P^*$";
  species G in compartment = genes*Omega^(-1);
  species GP in compartment = 0; GP is "GPN";
  species GPN2 in compartment = 0;
  species E in compartment = 10;
  species EP in compartment = 0;
  species D in compartment = 1;
  species DP in compartment = 0;
  species R in compartment = 1;
  species RPC in compartment = 0;
  species S in compartment = 1;
  species SPN in compartment = 0;

  // Parameters:
  k2 = Omega*feedback*0.5;
  km2 = Omega*0.5;
  transcription = genes^(-1)*Omega*1000; transcription is "k0";
  parameter_4 = k2*50; parameter_4 is "k3";
  Omega = compartment*600000000000000;
  feedback = 1;
  bind = 10;
  unbind = 1;
  kcat = 1;
  genes = 1;

  // Reactions:
  transscription: G => M + G; compartment*G*transcription;
  translate: M => M + P; ks*compartment*M;
    ks = 5;
  pg_unbind: GP => G + Pstar; compartment*km2*GP;
  enzyme2bindP: E + Pstar => EP; Pstar*compartment*k4*E;
    k4 = 10;
  enzyme2unbindP: EP => E + Pstar; compartment*km4*EP;
    km4 = 5;
  enzyme2cat: EP => E; kcat4*compartment*EP;
    kcat4 = 10;
  p_degrad: P => ; kdp*compartment*P;
    kdp = 0.5;
  m_degrad: M => ; compartment*M*kdm;
    kdm = 5;
  pg_bind: G + Pstar => GP; k2*Pstar*compartment*G;
  transport_in: P => Pstar; kin*compartment*P;
    kin = 0;
  transport_out: Pstar => P; Pstar*compartment*kout;
    kout = 0;
  pg_bind2: Pstar + GP => GPN2; parameter_4*Pstar*compartment*GP;
  pg_unbind2: GPN2 => Pstar + GP; GPN2*compartment*km2;
  enzyme1bind: D + P => DP; D*compartment*k3*P;
    k3 = 0.5;
  enzyme1unbind: DP => D + P; compartment*DP*km3;
    km3 = 0.5;
  enzyme1cat: DP => D; kcat3*compartment*DP;
    kcat3 = 0.5;
  reactionReverse: RPC => R + P; RPC*compartment*k_rev; reactionReverse is "unbindR (Reverse)";
    k_rev = 5;
  reaction: R + P => RPC; compartment*R*reaction_k*P; reaction is "bindR";
    reaction_k = 1;
  bindS: Pstar + S => SPN; bindS_k*Pstar*compartment*S;
    bindS_k = 1;
  reaction_18Reverse: SPN => Pstar + S; compartment*k_1*SPN; reaction_18Reverse is "unbindS";
    k_1 = 1;
  reaction_17Reverse: R + Pstar => RPC; Pstar*compartment*reaction_17Reverse_k*R; reaction_17Reverse is "reverseR";
    reaction_17Reverse_k = 0;
  Rcat: RPC => R + Pstar; Rcat_k*RPC*compartment;
    Rcat_k = 500; Rcat_k_fwd = 5;
  Scat: SPN => P + S; compartment*Scat_k*SPN;
    Scat_k = 500; Scat_k_fwd = 5;
  reaction_19Reverse: P + S => SPN; compartment*reaction_19Reverse_k*S*P; reaction_19Reverse is "reverseS";
    reaction_19Reverse_k = 0;

  // Unit definitions:
  unit substance = 1e-9 mole;
  unit volume = litre;
  unit area = metre^2;
  unit length = metre;
  unit time = 86400 second;
end
