// SBML level 2 version 4

model Core_Model()
  // Core model for circadian rhythms

  // Compartments:
  compartment compartment = 1e-15; compartment is "cytosol";

  // Species:
  species M in compartment = 0;
  species P in compartment = 0;
  species Pstar in compartment = 0; Pstar is "$P^*$";
  species G in compartment = Omega^(-1);
  species GP in compartment = 0; GP is "GPN";
  species GPN2 in compartment = 0;
  species E in compartment = 10;
  species EP in compartment = 0;
  species D in compartment = 1;
  species DP in compartment = 0;
  species R in compartment = 1;
  species RPC in compartment = 0;
  species S in compartment = 1;
  species SPN in compartment = 0;

  // Parameters:
  k2 = Omega*feedback*0.5;
  km2 = Omega*0.5;
  transcription = Omega*500; transcription is "k0";
  parameter_4 = k2*50; parameter_4 is "k3";
  Omega = compartment*6e17;
  feedback = 10;
  bind = 10;
  unbind = 1;
  kcat = 1;

  // Reactions:
  transscription: G => G + M; compartment*G*transcription;
  translate: M => P + M; compartment*M*ks;
    ks = 5;
  pg_unbind: GP => G + Pstar; compartment*km2*GP;
  enzyme2bindP: E + Pstar => EP; Pstar*k4*compartment*E;
    k4 = 10;
  enzyme2unbindP: EP => E + Pstar; compartment*km4*EP;
    km4 = 5;
  enzyme2cat: EP => E; compartment*EP*kcat4;
    kcat4 = 10;
  p_degrad: P => ; compartment*P*kdp;
    kdp = 0.5;
  m_degrad: M => ; compartment*kdm*M;
    kdm = 5;
  pg_bind: G + Pstar => GP; Pstar*compartment*G*k2;
  transport_in: P => Pstar; compartment*kin*P;
    kin = 0;
  transport_out: Pstar => P; Pstar*compartment*kout;
    kout = 0;
  pg_bind2: GP + Pstar => GPN2; Pstar*compartment*GP*parameter_4;
  pg_unbind2: GPN2 => GP + Pstar; compartment*km2*GPN2;
  enzyme1bind: P + D => DP; compartment*k3*P*D;
    k3 = 0.5;
  enzyme1unbind: DP => P + D; compartment*DP*km3;
    km3 = 0.5;
  enzyme1cat: DP => D; compartment*DP*kcat3;
    kcat3 = 0.5;
  reactionReverse: RPC => P + R; compartment*k_rev*RPC; reactionReverse is "unbindR (Reverse)";
    k_rev = 5;
  reaction: P + R => RPC; compartment*reaction_k*R*P; reaction is "bindR";
    reaction_k = 1;
  bindS: S + Pstar => SPN; Pstar*compartment*S*bindS_k;
    bindS_k = 1;
  reaction_18Reverse: SPN => S + Pstar; k_1*compartment*SPN; reaction_18Reverse is "unbindS";
    k_1 = 1;
  reaction_17Reverse: R + Pstar => RPC; Pstar*compartment*reaction_17Reverse_k*R; reaction_17Reverse is "reverseR";
    reaction_17Reverse_k = 0;
  Rcat: RPC => R + Pstar; compartment*Rcat_k*RPC;
    Rcat_k = 500; Rcat_k_fwd = 5;
  Scat: SPN => P + S; compartment*Scat_k*SPN;
    Scat_k = 500; Scat_k_fwd = 5;
  reaction_19Reverse: P + S => SPN; compartment*S*P*reaction_19Reverse_k; reaction_19Reverse is "reverseS";
    reaction_19Reverse_k = 0;

  // Unit definitions:
  unit substance = 1e-6 mole;
  unit volume = litre;
  unit area = metre^2;
  unit length = metre;
  unit time = 86400 second;
end
