// SBML level 2 version 4

model Core_Model()
  // Core model for circadian rhythms

  // Compartments:
  compartment compartment = 2e-15; compartment is "cytosol";

  // Species:
  species species_M in compartment = 0;
  species species_P in compartment = 0; species_P is "PC";
  species species_PN in compartment = 0;
  species species_G in compartment = 1/Omega;
  species species_GP in compartment = 0; species_GP is "GPN";
  species species_GPN2 in compartment = 0;
  species species_E in compartment = 10;
  species species_EP in compartment = 0;
  species species_D in compartment = 1;
  species species_DP in compartment = 0;

  // Parameters:
  k2 = Omega*0.5;
  km2 = Omega*0.5;
  k0 = Omega*500;
  k3 = k2*50;
  Omega = compartment*6*10^17;

  // Reactions:
  transscription: species_G => species_G + species_M; compartment*k0*species_G;
  translate: species_M => species_M + species_P; compartment*translate_k1*species_M;
    translate_k1 = 5;
  pg_unbind: species_GP => species_PN + species_G; compartment*km2*species_GP;
  enzyme2bindP: species_E + species_PN => species_EP; compartment*k5*species_E*species_PN;
    k5 = 10;
  enzyme2unbindP: species_EP => species_E + species_PN; compartment*km5*species_EP;
    km5 = 5;
  enzyme2cat: species_EP => species_E; compartment*kcat5*species_EP;
    kcat5 = 10;
  p_degrad: species_P => ; compartment*kdp*species_P;
    kdp = 0.5;
  m_degrad: species_M => ; compartment*kdm*species_M;
    kdm = 5;
  pg_bind: species_G + species_PN => species_GP; compartment*k2*species_G*species_PN;
  transport_out: species_P => species_PN; compartment*transport_out_k1*species_P;
    transport_out_k1 = 5;
  transport_in: species_PN => species_P; compartment*km1*species_PN;
    km1 = 5;
  pg_bind2: species_GP + species_PN => species_GPN2; compartment*k3*species_GP*species_PN;
  pg_unbind2: species_GPN2 => species_GP + species_PN; compartment*km2*species_GPN2;
  enzyme1bind: species_D + species_P => species_DP; compartment*k4*species_D*species_P;
    k4 = 0.5;
  enzyme1unbind: species_DP => species_D + species_P; compartment*km4*species_DP;
    km4 = 0.5;
  enzyme1cat: species_DP => species_D; compartment*kcat4*species_DP;
    kcat4 = 0.5;

  // Unit definitions:
  unit volume = litre;
  unit substance = 1e-6 mole;
  unit time = 86400 second;
end
