// SBML level 2 version 4

model Core_Model()
  // Core model for circadian rhythms

  // Compartments:
  compartment compartment = 2e-16; compartment is "cytosol";

  // Species:
  species species_M in compartment = 0;
  species species_P in compartment = 0; species_P is "PC";
  species species_PN in compartment = 0;
  species species_G in compartment = 1/Omega;
  species species_GP in compartment = 0; species_GP is "GPN";
  species species_GPN2 in compartment = 0;
  species species_F in compartment = 10;
  species species_FP in compartment = 0;
  species species_E in compartment = 1; species_E is "D";
  species species_EP in compartment = 0; species_EP is "DP";

  // Parameters:
  k1 = Omega*50;
  km1 = Omega*0.5;
  k0 = Omega*500;
  k2 = k1*50;
  Omega = compartment*6*10^17;

  // Reactions:
  transscription: species_G => species_G + species_M; compartment*k0*species_G;
  translate: species_M => species_M + species_P; compartment*ks*species_M;
    ks = 5;
  pg_unbind: species_GP => species_PN + species_G; compartment*km1*species_GP;
  enzyme2bindP: species_F + species_PN => species_FP; compartment*k4*species_F*species_PN;
    k4 = 10;
  enzyme2unbindP: species_FP => species_F + species_PN; compartment*km4*species_FP;
    km4 = 5;
  enzyme2cat: species_FP => species_F; compartment*kcat4*species_FP;
    kcat4 = 10;
  p_degrad: species_P => ; compartment*kdp*species_P;
    kdp = 0.5;
  m_degrad: species_M => ; compartment*kdm*species_M;
    kdm = 5;
  pg_bind: species_G + species_PN => species_GP; compartment*k1*species_G*species_PN;
  transport_in: species_P => species_PN; compartment*kin*species_P;
    kin = 5;
  transport_out: species_PN => species_P; compartment*kout*species_PN;
    kout = 5;
  pg_bind2: species_GP + species_PN => species_GPN2; compartment*k2*species_GP*species_PN;
  pg_unbind2: species_GPN2 => species_GP + species_PN; compartment*km1*species_GPN2;
  enzyme1bind: species_E + species_P => species_EP; compartment*k3*species_E*species_P;
    k3 = 0.5;
  enzyme1unbind: species_EP => species_E + species_P; compartment*km3*species_EP;
    km3 = 0.5;
  enzyme1cat: species_EP => species_E; compartment*kcat3*species_EP;
    kcat3 = 0.5;

  // Unit definitions:
  unit volume = litre;
  unit substance = 1e-6 mole;
  unit time = 86400 second;
end
