// SBML level 2 version 4

model EnzymeReaction()
  // Michaelis-Menten (open reaction)

  // Compartments:
  compartment compartment = omega*5e-16;

  // Species:
  species species_S in compartment = 0;
  species species_P in compartment = 0;
  species species_E in compartment = 4e-6;
  species species_ES in compartment = 0;

  // Parameters:
  omega = 1; omega is "$\Omega$";

  // Reactions:
  input: => species_S; compartment*v;
    v = 1.8e-5;
  bind: species_S + species_E => species_ES; compartment*species_S*k1*species_E;
    k1 = 50000000;
  unbind: species_ES => species_S + species_E; compartment*km1*species_ES;
    km1 = 5;
  vcat: species_ES => species_P + species_E; compartment*species_ES*kcat;
    kcat = 5;
  out: species_P => ; compartment*species_P*kout;
    kout = 7;

  // Unit definitions:
  unit substance = mole;
  unit volume = litre;
  unit area = metre^2;
  unit length = metre;
  unit time = second;
  unit litre_per_mole_per_second = 1 / mole^3;
  unit per_second = 1 / second;
end
