// SBML level 2 version 4

function Constant_flux_irreversible(v)
  v;
end
Constant_flux_irreversible is "Constant flux (irreversible)";

model EnzymaticReaction()
  // Michaelis-Menten (open reaction)

  // Compartments:
  compartment compartment = 1e-15;

  // Species:
  species ES in compartment = 0;
  species P in compartment = 0;
  species S in compartment = 0;
  species E in compartment = 9.963233e-23/compartment;

  // Reactions:
  veq: E + S => ES; compartment*veq_k1*E*S; veq is "bind";
    veq_k1 = 1000000;
  vcat: ES => E + P; compartment*vcat_k1*ES;
    vcat_k1 = 1;
  input: => S; compartment*Constant_flux_irreversible(v);
    v = 9.5e-5;
  unbind: ES => S + E; compartment*unbind_k1*ES;
    unbind_k1 = 1;
  out: P => ; compartment*out_k1*P;
    out_k1 = 5;

  // Unit definitions:
  unit per_second = 1 / second;
  unit litre_per_mole_per_second = litre / (mole * second);
end
