// SBML level 2 version 4

model Model_1()
  // Extended Goodwin

  // Compartments:
  compartment cytosol = 1e-18;

  // Species:
  species G in cytosol = 0.001660539;
  species M in cytosol = 0;
  species P in cytosol = 0;
  species P2 in cytosol = 0;
  species GP2 in cytosol = 0;
  species E in cytosol = 0.01660539;
  species EP in cytosol = 0;

  // Reactions:
  transscription: G => G + M; cytosol*transscription_k1*G;
    transscription_k1 = 10000;
  translate: M => M + P; cytosol*translate_k1*M;
    translate_k1 = 10;
  pg_unbind: GP2 => P2 + G; cytosol*pg_unbind_k1*GP2;
    pg_unbind_k1 = 10;
  enzyme2bindP: E + P2 => EP; cytosol*enzyme2bindP_k1*E*P2;
    enzyme2bindP_k1 = 10;
  enzyme2unbindP: EP => E + P2; cytosol*enzyme2unbindP_k1*EP;
    enzyme2unbindP_k1 = 1;
  enzyme2cat: EP => E; cytosol*enzyme2cat_k1*EP;
    enzyme2cat_k1 = 30;
  p_degrad: P => ; cytosol*p_degrad_k1*P;
    p_degrad_k1 = 1;
  m_degrad: M => ; cytosol*m_degrad_k1*M;
    m_degrad_k1 = 100;
  pg_bind: G + P2 => GP2; cytosol*pg_bind_k1*G*P2;
    pg_bind_k1 = 100;
  transport_out: P => P2; cytosol*transport_out_k1*P;
    transport_out_k1 = 100;
  transport_in: P2 => P; cytosol*transport_in_k1*P2;
    transport_in_k1 = 10;

  // Unit definitions:
  unit volume = 1e-3 litre;
  unit substance = 1e-3 mole;
end
