// SBML level 2 version 4

model GeneExpression()
  // Gene Expression I

  // Compartments:
  compartment cell = 1e-15; cell is "$\Omega$";

  // Species:
  substanceOnly species Gene in cell = cell*0.00166;
  substanceOnly species mRNA in cell = 0;
  substanceOnly species Protein in cell = 0;
  substanceOnly species Enzyme in cell = cell*0.1;
  substanceOnly species Complex in cell = 0;

  // Parameters:
  k0 = 1445.783; k0 is "$k_0$";
  ks = 1.5; ks is "$k_s$";
  kdM = 20; kdM is "$k_dM$";
  k1 = 400; k1 is "$k_1$";
  km1 = 2; km1 is "$k_-1$";
  k2 = 2; k2 is "$k_2$";

  // Reactions:
  transcription: Gene => Gene + mRNA; k0*Gene; transcription is "Transcription";
  translation: mRNA => Protein + mRNA; ks*mRNA; translation is "Translation";
  degrade_mRNA: mRNA => ; mRNA*kdM; degrade_mRNA is "mRNA degradation";
  binding: Protein + Enzyme => Complex; Protein*cell^(-1)*k1*Enzyme; binding is "Enzyme binding";
  unbinding: Complex => Protein + Enzyme; km1*Complex; unbinding is "Enzyme unbinding";
  protein_degradation: Complex => Enzyme; Complex*k2; protein_degradation is "Enzymatic degradation";

  // Unit definitions:
  unit substance = 1e-6 mole;
  unit volume = litre;
  unit area = metre^2;
  unit length = metre;
  unit time = 60 second;
end
